// COMSOL Multiphysics 5.3.0.316 model "trunc_cyl_shell_nas.mph"
// Outline of the model tree

Geometry
  geom1 "Geometry 1" (3D, length unit m)
    cyl1: Cylinder | r = 0.05/0.2+ 0.05/2; h = 0.05*10
    cyl2: Cylinder | r = 0.05/0.2- 0.05/2; h = 0.5
    dif1: Difference | input = cyl1; input2 = cyl2
    fin: Finalize "Form Union"

Physics
  solid: SolidMechanics on all domains
    dependent variable u = {u, v, w}
    ShapeProperty.order_displacement = 1
    lemm1: LinearElasticModel "Linear Elastic Material 1" (default)
      E_mat = userdef
      E = 205e9
      nu_mat = userdef
      nu = 0.3
      rho_mat = userdef
      rho = 7850
    free1: Free (default)
    init1: init "Initial Values 1" (default)

Mesh
  mesh1 "Mesh 1" (physics-controlled)

Studies
  std1 "Study 1"
    eig: Eigenfrequency | neigs = 20; shift = 1[Hz]

Solver configurations
  sol1 "Solution 1" (study std1)
    v1: Variables "Dependent Variables 1"
    e1: Eigenvalue "Eigenvalue Solver 1"
      dDef: Direct

Datasets
  dset1: Solution | solution = sol1

Plots
  pg1: PlotGroup3D "Mode Shape (solid)" | data = dset1
    surf1: Surface | expr = solid.disp
      def: Deform "Deformation" | expr = {u, v, w}; descr = Displacement field (material and geometry frames)